mass 1*4 69.723 #Ga
mass 5*8 78.971 #Se
group layer_1 type 1 2 5 6
group layer_2 type 3 4 7 8
pair_style hybrid sw sw  lj/cut 11.0
pair_coeff * * sw 1 scripts/afm/GaSe/size_100x_100y/sub_aSi/tip_Si_r25/K300/potentials/GaSe.sw Ga1  Ga2  NULL  NULL  Se1  Se2  NULL  NULL # interlayer '2D' Layer 1
pair_coeff * * sw 2 scripts/afm/GaSe/size_100x_100y/sub_aSi/tip_Si_r25/K300/potentials/GaSe.sw NULL  NULL  Ga1  Ga2  NULL  NULL  Se1  Se2 # interlayer '2D' Layer 2
pair_coeff 1*2 3*4 lj/cut 0.017995811 4.383
pair_coeff 1*2 7*8 lj/cut 0.015069327432196945 4.2940000000000005
pair_coeff 3*4 5*6 lj/cut 0.015069327432196945 4.2940000000000005
pair_coeff 5*6 7*8 lj/cut 0.0126187494 4.205
