mass 1*6 69.723 #Ga
mass 7*12 78.971 #Se
group layer_1 type 1 2 7 8
group layer_2 type 3 4 9 10
group layer_3 type 5 6 11 12
pair_style hybrid sw sw sw  lj/cut 11.0
pair_coeff * * sw 1 scripts/afm/GaSe/size_100x_100y/sub_aSi/tip_Si_r25/K300/potentials/GaSe.sw Ga1  Ga2  NULL  NULL  NULL  NULL  Se1  Se2  NULL  NULL  NULL  NULL # interlayer '2D' Layer 1
pair_coeff * * sw 2 scripts/afm/GaSe/size_100x_100y/sub_aSi/tip_Si_r25/K300/potentials/GaSe.sw NULL  NULL  Ga1  Ga2  NULL  NULL  NULL  NULL  Se1  Se2  NULL  NULL # interlayer '2D' Layer 2
pair_coeff * * sw 3 scripts/afm/GaSe/size_100x_100y/sub_aSi/tip_Si_r25/K300/potentials/GaSe.sw NULL  NULL  NULL  NULL  Ga1  Ga2  NULL  NULL  NULL  NULL  Se1  Se2 # interlayer '2D' Layer 3
pair_coeff 1*2 3*6 lj/cut 0.017995811 4.383
pair_coeff 3*4 5*6 lj/cut 0.017995811 4.383
pair_coeff 1*2 9*12 lj/cut 0.015069327432196945 4.2940000000000005
pair_coeff 3*4 11*12 lj/cut 0.015069327432196945 4.2940000000000005
pair_coeff 3*6 7*8 lj/cut 0.015069327432196945 4.2940000000000005
pair_coeff 5*6 9*10 lj/cut 0.015069327432196945 4.2940000000000005
pair_coeff 7*8 9*12 lj/cut 0.0126187494 4.205
pair_coeff 9*10 11*12 lj/cut 0.0126187494 4.205
