mass 1*3 114.818 #In
mass 4*6 74.921595 #As
group layer_1 type 1 4
group layer_2 type 2 5
group layer_3 type 3 6
pair_style hybrid sw sw sw  lj/cut 11.0
pair_coeff * * sw 1 scripts/afm/b-InAs/size_100x_100y/sub_aSi/tip_Si_r25/K300/potentials/b-InAs.sw In  NULL  NULL  As  NULL  NULL # interlayer '2D' Layer 1
pair_coeff * * sw 2 scripts/afm/b-InAs/size_100x_100y/sub_aSi/tip_Si_r25/K300/potentials/b-InAs.sw NULL  In  NULL  NULL  As  NULL # interlayer '2D' Layer 2
pair_coeff * * sw 3 scripts/afm/b-InAs/size_100x_100y/sub_aSi/tip_Si_r25/K300/potentials/b-InAs.sw NULL  NULL  In  NULL  NULL  As # interlayer '2D' Layer 3
pair_coeff 1 2*3 lj/cut 0.0259746766 4.463
pair_coeff 2 3 lj/cut 0.0259746766 4.463
pair_coeff 1 5*6 lj/cut 0.018655890222780042 4.346500000000001
pair_coeff 2 6 lj/cut 0.018655890222780042 4.346500000000001
pair_coeff 2*3 4 lj/cut 0.018655890222780042 4.346500000000001
pair_coeff 3 5 lj/cut 0.018655890222780042 4.346500000000001
pair_coeff 4 5*6 lj/cut 0.0133992906 4.23
pair_coeff 5 6 lj/cut 0.0133992906 4.23
