mass 1*2 28.085 #Si
mass 3*4 15.999 #O
group layer_1 type 1 3
group layer_2 type 2 4
pair_style hybrid sw sw  lj/cut 11.0
pair_coeff * * sw 1 scripts/afm/b-SiO/size_100x_100y/sub_aSi/tip_Si_r25/K300/potentials/b-SiO.sw Si  NULL  O  NULL # interlayer '2D' Layer 1
pair_coeff * * sw 2 scripts/afm/b-SiO/size_100x_100y/sub_aSi/tip_Si_r25/K300/potentials/b-SiO.sw NULL  Si  NULL  O # interlayer '2D' Layer 2
pair_coeff 1 2 lj/cut 0.0174320868 4.295
pair_coeff 1 4 lj/cut 0.006734602673104569 3.8975
pair_coeff 2 3 lj/cut 0.006734602673104569 3.8975
pair_coeff 3 4 lj/cut 0.002601804 3.5
