mass 1*3 118.71 #Sn
mass 4*6 28.085 #Si
group layer_1 type 1 4
group layer_2 type 2 5
group layer_3 type 3 6
pair_style hybrid sw sw sw  lj/cut 11.0
pair_coeff * * sw 1 scripts/afm/b-SnSi/size_100x_100y/sub_aSi/tip_Si_r25/K300/potentials/b-SnSi.sw Sn  NULL  NULL  Si  NULL  NULL # interlayer '2D' Layer 1
pair_coeff * * sw 2 scripts/afm/b-SnSi/size_100x_100y/sub_aSi/tip_Si_r25/K300/potentials/b-SnSi.sw NULL  Sn  NULL  NULL  Si  NULL # interlayer '2D' Layer 2
pair_coeff * * sw 3 scripts/afm/b-SnSi/size_100x_100y/sub_aSi/tip_Si_r25/K300/potentials/b-SnSi.sw NULL  NULL  Sn  NULL  NULL  Si # interlayer '2D' Layer 3
pair_coeff 1 2*3 lj/cut 0.0245870478 4.392
pair_coeff 2 3 lj/cut 0.0245870478 4.392
pair_coeff 1 5*6 lj/cut 0.020702742605880727 4.343500000000001
pair_coeff 2 6 lj/cut 0.020702742605880727 4.343500000000001
pair_coeff 2*3 4 lj/cut 0.020702742605880727 4.343500000000001
pair_coeff 3 5 lj/cut 0.020702742605880727 4.343500000000001
pair_coeff 4 5*6 lj/cut 0.0174320868 4.295
pair_coeff 5 6 lj/cut 0.0174320868 4.295
