mass 1*3 28.085 #Si sub
mass 4*6 28.085 #Si tip
mass 7*18 30.973761998 #P 2D
group sub_all type 1 2 3
group sub_fix type 2
group sub_thermo type 3
group tip_all type 4 5 6
group tip_fix type 5
group tip_thermo type 6
group 2D_all type 7 8 9 10 11 12 13 14 15 16 17 18
group layer_1 type 7 8 9 10
group layer_2 type 11 12 13 14
group layer_3 type 15 16 17 18
group mobile union tip_thermo sub_thermo
pair_style hybrid sw sw sw sw sw  lj/cut 8.0
pair_coeff * * sw 1 scripts/afm/black_phosphorus/size_100x_100y/sub_aSi/tip_Si_r25/K300/potentials/Si.sw Si  Si  Si  NULL  NULL  NULL  NULL  NULL  NULL  NULL  NULL  NULL  NULL  NULL  NULL  NULL  NULL  NULL # interlayer Sub
pair_coeff * * sw 2 scripts/afm/black_phosphorus/size_100x_100y/sub_aSi/tip_Si_r25/K300/potentials/Si.sw NULL  NULL  NULL  Si  Si  Si  NULL  NULL  NULL  NULL  NULL  NULL  NULL  NULL  NULL  NULL  NULL  NULL # interlayer Tip
pair_coeff * * sw 3 scripts/afm/black_phosphorus/size_100x_100y/sub_aSi/tip_Si_r25/K300/potentials/black_phosphorus.sw NULL  NULL  NULL  NULL  NULL  NULL  P1  P2  P3  P4  NULL  NULL  NULL  NULL  NULL  NULL  NULL  NULL # interlayer '2D' Layer 1
pair_coeff * * sw 4 scripts/afm/black_phosphorus/size_100x_100y/sub_aSi/tip_Si_r25/K300/potentials/black_phosphorus.sw NULL  NULL  NULL  NULL  NULL  NULL  NULL  NULL  NULL  NULL  P1  P2  P3  P4  NULL  NULL  NULL  NULL # interlayer '2D' Layer 2
pair_coeff * * sw 5 scripts/afm/black_phosphorus/size_100x_100y/sub_aSi/tip_Si_r25/K300/potentials/black_phosphorus.sw NULL  NULL  NULL  NULL  NULL  NULL  NULL  NULL  NULL  NULL  NULL  NULL  NULL  NULL  P1  P2  P3  P4 # interlayer '2D' Layer 3
pair_coeff 1*3 7*18 lj/cut 0.01518400271952859 4.221
pair_coeff 4*6 7*18 lj/cut 0.01518400271952859 4.221
pair_coeff 7*10 11*18 lj/cut 0.013225837 4.147
pair_coeff 11*14 15*18 lj/cut 0.013225837 4.147
pair_coeff 1*3 4*6  lj/cut 0.0174320868 4.295
