mass 1*24 10.81 #B
group layer_1 type 1 2 3 4 5 6 7 8 9 10 11 12
group layer_2 type 13 14 15 16 17 18 19 20 21 22 23 24
pair_style hybrid sw sw  lj/cut 11.0
pair_coeff * * sw 1 scripts/afm/borophene/size_100x_100y/sub_aSi/tip_Si_r25/K300/potentials/borophene.sw B1  B2  B3  B4  B5  B6  B7  B8  B9  B10  B11  B12  NULL  NULL  NULL  NULL  NULL  NULL  NULL  NULL  NULL  NULL  NULL  NULL # interlayer '2D' Layer 1
pair_coeff * * sw 2 scripts/afm/borophene/size_100x_100y/sub_aSi/tip_Si_r25/K300/potentials/borophene.sw NULL  NULL  NULL  NULL  NULL  NULL  NULL  NULL  NULL  NULL  NULL  NULL  B1  B2  B3  B4  B5  B6  B7  B8  B9  B10  B11  B12 # interlayer '2D' Layer 2
pair_coeff 1*12 13*24 lj/cut 0.007805412 4.083
