mass 1*12 58.933194 #Co
mass 13*36 127.6 #Te
group layer_1 type 1 2 3 4 13 14 15 16 17 18 19 20
group layer_2 type 5 6 7 8 21 22 23 24 25 26 27 28
group layer_3 type 9 10 11 12 29 30 31 32 33 34 35 36
pair_style hybrid sw sw sw  lj/cut 11.0
pair_coeff * * sw 1 scripts/afm/h-CoTe2/size_100x_100y/sub_aSi/tip_Si_r25/K300/potentials/h-CoTe2.sw Co1  Co2  Co3  Co4  NULL  NULL  NULL  NULL  NULL  NULL  NULL  NULL  Te1  Te2  Te3  Te4  Te5  Te6  Te7  Te8  NULL  NULL  NULL  NULL  NULL  NULL  NULL  NULL  NULL  NULL  NULL  NULL  NULL  NULL  NULL  NULL # interlayer '2D' Layer 1
pair_coeff * * sw 2 scripts/afm/h-CoTe2/size_100x_100y/sub_aSi/tip_Si_r25/K300/potentials/h-CoTe2.sw NULL  NULL  NULL  NULL  Co1  Co2  Co3  Co4  NULL  NULL  NULL  NULL  NULL  NULL  NULL  NULL  NULL  NULL  NULL  NULL  Te1  Te2  Te3  Te4  Te5  Te6  Te7  Te8  NULL  NULL  NULL  NULL  NULL  NULL  NULL  NULL # interlayer '2D' Layer 2
pair_coeff * * sw 3 scripts/afm/h-CoTe2/size_100x_100y/sub_aSi/tip_Si_r25/K300/potentials/h-CoTe2.sw NULL  NULL  NULL  NULL  NULL  NULL  NULL  NULL  Co1  Co2  Co3  Co4  NULL  NULL  NULL  NULL  NULL  NULL  NULL  NULL  NULL  NULL  NULL  NULL  NULL  NULL  NULL  NULL  Te1  Te2  Te3  Te4  Te5  Te6  Te7  Te8 # interlayer '2D' Layer 3
pair_coeff 1*4 5*12 lj/cut 0.0006070876 2.872
pair_coeff 5*8 9*12 lj/cut 0.0006070876 2.872
pair_coeff 1*4 21*36 lj/cut 0.0032368970030985417 3.671
pair_coeff 5*8 29*36 lj/cut 0.0032368970030985417 3.671
pair_coeff 5*12 13*20 lj/cut 0.0032368970030985417 3.671
pair_coeff 9*12 21*28 lj/cut 0.0032368970030985417 3.671
pair_coeff 13*20 21*36 lj/cut 0.0172586332 4.47
pair_coeff 21*28 29*36 lj/cut 0.0172586332 4.47
