mass 1*12 55.845 #Fe
mass 13*36 78.971 #Se
group layer_1 type 1 2 3 4 13 14 15 16 17 18 19 20
group layer_2 type 5 6 7 8 21 22 23 24 25 26 27 28
group layer_3 type 9 10 11 12 29 30 31 32 33 34 35 36
pair_style hybrid sw sw sw  lj/cut 11.0
pair_coeff * * sw 1 scripts/afm/h-FeSe2/size_100x_100y/sub_aSi/tip_Si_r25/K300/potentials/h-FeSe2.sw Fe1  Fe2  Fe3  Fe4  NULL  NULL  NULL  NULL  NULL  NULL  NULL  NULL  Se1  Se2  Se3  Se4  Se5  Se6  Se7  Se8  NULL  NULL  NULL  NULL  NULL  NULL  NULL  NULL  NULL  NULL  NULL  NULL  NULL  NULL  NULL  NULL # interlayer '2D' Layer 1
pair_coeff * * sw 2 scripts/afm/h-FeSe2/size_100x_100y/sub_aSi/tip_Si_r25/K300/potentials/h-FeSe2.sw NULL  NULL  NULL  NULL  Fe1  Fe2  Fe3  Fe4  NULL  NULL  NULL  NULL  NULL  NULL  NULL  NULL  NULL  NULL  NULL  NULL  Se1  Se2  Se3  Se4  Se5  Se6  Se7  Se8  NULL  NULL  NULL  NULL  NULL  NULL  NULL  NULL # interlayer '2D' Layer 2
pair_coeff * * sw 3 scripts/afm/h-FeSe2/size_100x_100y/sub_aSi/tip_Si_r25/K300/potentials/h-FeSe2.sw NULL  NULL  NULL  NULL  NULL  NULL  NULL  NULL  Fe1  Fe2  Fe3  Fe4  NULL  NULL  NULL  NULL  NULL  NULL  NULL  NULL  NULL  NULL  NULL  NULL  NULL  NULL  NULL  NULL  Se1  Se2  Se3  Se4  Se5  Se6  Se7  Se8 # interlayer '2D' Layer 3
pair_coeff 1*4 5*12 lj/cut 0.0005637242 2.912
pair_coeff 5*8 9*12 lj/cut 0.0005637242 2.912
pair_coeff 1*4 21*36 lj/cut 0.0026671134978690876 3.5585
pair_coeff 5*8 29*36 lj/cut 0.0026671134978690876 3.5585
pair_coeff 5*12 13*20 lj/cut 0.0026671134978690876 3.5585
pair_coeff 9*12 21*28 lj/cut 0.0026671134978690876 3.5585
pair_coeff 13*20 21*36 lj/cut 0.0126187494 4.205
pair_coeff 21*28 29*36 lj/cut 0.0126187494 4.205
