mass 1*8 44.955908 #Sc
mass 9*24 32.06 #S
group layer_1 type 1 2 3 4 9 10 11 12 13 14 15 16
group layer_2 type 5 6 7 8 17 18 19 20 21 22 23 24
pair_style hybrid sw sw  lj/cut 11.0
pair_coeff * * sw 1 scripts/afm/h-ScS2/size_100x_100y/sub_aSi/tip_Si_r25/K300/potentials/h-ScS2.sw Sc1  Sc2  Sc3  Sc4  NULL  NULL  NULL  NULL  S1  S2  S3  S4  S5  S6  S7  S8  NULL  NULL  NULL  NULL  NULL  NULL  NULL  NULL # interlayer '2D' Layer 1
pair_coeff * * sw 2 scripts/afm/h-ScS2/size_100x_100y/sub_aSi/tip_Si_r25/K300/potentials/h-ScS2.sw NULL  NULL  NULL  NULL  Sc1  Sc2  Sc3  Sc4  NULL  NULL  NULL  NULL  NULL  NULL  NULL  NULL  S1  S2  S3  S4  S5  S6  S7  S8 # interlayer '2D' Layer 2
pair_coeff 1*4 5*8 lj/cut 0.0008239046 3.295
pair_coeff 1*4 17*24 lj/cut 0.0031287827499635315 3.665
pair_coeff 5*8 9*16 lj/cut 0.0031287827499635315 3.665
pair_coeff 9*16 17*24 lj/cut 0.0118815716 4.035
