mass 1*8 180.94788 #Ta
mass 9*24 78.971 #Se
group layer_1 type 1 2 3 4 9 10 11 12 13 14 15 16
group layer_2 type 5 6 7 8 17 18 19 20 21 22 23 24
pair_style hybrid sw sw  lj/cut 11.0
pair_coeff * * sw 1 scripts/afm/h-TaSe2/size_100x_100y/sub_aSi/tip_Si_r25/K300/potentials/h-TaSe2.sw Ta1  Ta2  Ta3  Ta4  NULL  NULL  NULL  NULL  Se1  Se2  Se3  Se4  Se5  Se6  Se7  Se8  NULL  NULL  NULL  NULL  NULL  NULL  NULL  NULL # interlayer '2D' Layer 1
pair_coeff * * sw 2 scripts/afm/h-TaSe2/size_100x_100y/sub_aSi/tip_Si_r25/K300/potentials/h-TaSe2.sw NULL  NULL  NULL  NULL  Ta1  Ta2  Ta3  Ta4  NULL  NULL  NULL  NULL  NULL  NULL  NULL  NULL  Se1  Se2  Se3  Se4  Se5  Se6  Se7  Se8 # interlayer '2D' Layer 2
pair_coeff 1*4 5*8 lj/cut 0.0035124354 3.17
pair_coeff 1*4 17*24 lj/cut 0.006657517712803231 3.6875
pair_coeff 5*8 9*16 lj/cut 0.006657517712803231 3.6875
pair_coeff 9*16 17*24 lj/cut 0.0126187494 4.205
