mass 1*12 28.085 #Si
mass 13*24 127.6 #Te
group layer_1 type 1 2 3 4 13 14 15 16
group layer_2 type 5 6 7 8 17 18 19 20
group layer_3 type 9 10 11 12 21 22 23 24
pair_style hybrid sw sw sw  lj/cut 11.0
pair_coeff * * sw 1 scripts/afm/p-SiTe/size_100x_100y/sub_aSi/tip_Si_r25/K300/potentials/p-SiTe.sw Si1  Si2  Si3  Si4  NULL  NULL  NULL  NULL  NULL  NULL  NULL  NULL  Te1  Te2  Te3  Te4  NULL  NULL  NULL  NULL  NULL  NULL  NULL  NULL # interlayer '2D' Layer 1
pair_coeff * * sw 2 scripts/afm/p-SiTe/size_100x_100y/sub_aSi/tip_Si_r25/K300/potentials/p-SiTe.sw NULL  NULL  NULL  NULL  Si1  Si2  Si3  Si4  NULL  NULL  NULL  NULL  NULL  NULL  NULL  NULL  Te1  Te2  Te3  Te4  NULL  NULL  NULL  NULL # interlayer '2D' Layer 2
pair_coeff * * sw 3 scripts/afm/p-SiTe/size_100x_100y/sub_aSi/tip_Si_r25/K300/potentials/p-SiTe.sw NULL  NULL  NULL  NULL  NULL  NULL  NULL  NULL  Si1  Si2  Si3  Si4  NULL  NULL  NULL  NULL  NULL  NULL  NULL  NULL  Te1  Te2  Te3  Te4 # interlayer '2D' Layer 3
pair_coeff 1*4 5*12 lj/cut 0.0174320868 4.295
pair_coeff 5*8 9*12 lj/cut 0.0174320868 4.295
pair_coeff 1*4 17*24 lj/cut 0.017345143181644877 4.3825
pair_coeff 5*8 21*24 lj/cut 0.017345143181644877 4.3825
pair_coeff 5*12 13*16 lj/cut 0.017345143181644877 4.3825
pair_coeff 9*12 17*20 lj/cut 0.017345143181644877 4.3825
pair_coeff 13*16 17*24 lj/cut 0.0172586332 4.47
pair_coeff 17*20 21*24 lj/cut 0.0172586332 4.47
