mass 1*3 28.085 #Si sub
mass 4*6 28.085 #Si tip
mass 7*30 208.9804 #Bi 2D
group sub_all type 1 2 3
group sub_fix type 2
group sub_thermo type 3
group tip_all type 4 5 6
group tip_fix type 5
group tip_thermo type 6
group 2D_all type 7 8 9 10 11 12 13 14 15 16 17 18 19 20 21 22 23 24 25 26 27 28 29 30
group layer_1 type 7 8 9 10 11 12 13 14
group layer_2 type 15 16 17 18 19 20 21 22
group layer_3 type 23 24 25 26 27 28 29 30
group mobile union tip_thermo sub_thermo
pair_style hybrid sw sw sw sw sw  lj/cut 8.0
pair_coeff * * sw 1 scripts/afm/p-bismuthene/size_100x_100y/sub_aSi/tip_Si_r25/K300/potentials/Si.sw Si  Si  Si  NULL  NULL  NULL  NULL  NULL  NULL  NULL  NULL  NULL  NULL  NULL  NULL  NULL  NULL  NULL  NULL  NULL  NULL  NULL  NULL  NULL  NULL  NULL  NULL  NULL  NULL  NULL # interlayer Sub
pair_coeff * * sw 2 scripts/afm/p-bismuthene/size_100x_100y/sub_aSi/tip_Si_r25/K300/potentials/Si.sw NULL  NULL  NULL  Si  Si  Si  NULL  NULL  NULL  NULL  NULL  NULL  NULL  NULL  NULL  NULL  NULL  NULL  NULL  NULL  NULL  NULL  NULL  NULL  NULL  NULL  NULL  NULL  NULL  NULL # interlayer Tip
pair_coeff * * sw 3 scripts/afm/p-bismuthene/size_100x_100y/sub_aSi/tip_Si_r25/K300/potentials/p-bismuthene.sw NULL  NULL  NULL  NULL  NULL  NULL  Bi1  Bi2  Bi3  Bi4  Bi5  Bi6  Bi7  Bi8  NULL  NULL  NULL  NULL  NULL  NULL  NULL  NULL  NULL  NULL  NULL  NULL  NULL  NULL  NULL  NULL # interlayer '2D' Layer 1
pair_coeff * * sw 4 scripts/afm/p-bismuthene/size_100x_100y/sub_aSi/tip_Si_r25/K300/potentials/p-bismuthene.sw NULL  NULL  NULL  NULL  NULL  NULL  NULL  NULL  NULL  NULL  NULL  NULL  NULL  NULL  Bi1  Bi2  Bi3  Bi4  Bi5  Bi6  Bi7  Bi8  NULL  NULL  NULL  NULL  NULL  NULL  NULL  NULL # interlayer '2D' Layer 2
pair_coeff * * sw 5 scripts/afm/p-bismuthene/size_100x_100y/sub_aSi/tip_Si_r25/K300/potentials/p-bismuthene.sw NULL  NULL  NULL  NULL  NULL  NULL  NULL  NULL  NULL  NULL  NULL  NULL  NULL  NULL  NULL  NULL  NULL  NULL  NULL  NULL  NULL  NULL  Bi1  Bi2  Bi3  Bi4  Bi5  Bi6  Bi7  Bi8 # interlayer '2D' Layer 3
pair_coeff 1*3 7*30 lj/cut 0.019787969535071965 4.3325
pair_coeff 4*6 7*30 lj/cut 0.019787969535071965 4.3325
pair_coeff 7*14 15*30 lj/cut 0.0224622412 4.37
pair_coeff 15*22 23*30 lj/cut 0.0224622412 4.37
pair_coeff 1*3 4*6  lj/cut 0.0174320868 4.295
