mass 1*2 178.49 #Hf
mass 3*6 32.06 #S
group layer_1 type 1 3 4
group layer_2 type 2 5 6
pair_style hybrid sw sw  lj/cut 11.0
pair_coeff * * sw 1 scripts/afm/t-HfS2/size_100x_100y/sub_aSi/tip_Si_r25/K300/potentials/t-HfS2.sw Hf  NULL  S1  S2  NULL  NULL # interlayer '2D' Layer 1
pair_coeff * * sw 2 scripts/afm/t-HfS2/size_100x_100y/sub_aSi/tip_Si_r25/K300/potentials/t-HfS2.sw NULL  Hf  NULL  NULL  S1  S2 # interlayer '2D' Layer 2
pair_coeff 1 2 lj/cut 0.0031221648 3.141
pair_coeff 1 5*6 lj/cut 0.006090667009301993 3.588
pair_coeff 2 3*4 lj/cut 0.006090667009301993 3.588
pair_coeff 3*4 5*6 lj/cut 0.0118815716 4.035
