mass 1*2 178.49 #Hf
mass 3*6 78.971 #Se
group layer_1 type 1 3 4
group layer_2 type 2 5 6
pair_style hybrid sw sw  lj/cut 11.0
pair_coeff * * sw 1 scripts/afm/t-HfSe2/size_100x_100y/sub_aSi/tip_Si_r25/K300/potentials/t-HfSe2.sw Hf  NULL  Se1  Se2  NULL  NULL # interlayer '2D' Layer 1
pair_coeff * * sw 2 scripts/afm/t-HfSe2/size_100x_100y/sub_aSi/tip_Si_r25/K300/potentials/t-HfSe2.sw NULL  Hf  NULL  NULL  Se1  Se2 # interlayer '2D' Layer 2
pair_coeff 1 2 lj/cut 0.0031221648 3.141
pair_coeff 1 5*6 lj/cut 0.006276767894123625 3.673
pair_coeff 2 3*4 lj/cut 0.006276767894123625 3.673
pair_coeff 3*4 5*6 lj/cut 0.0126187494 4.205
