mass 1*2 54.938044 #Mn
mass 3*6 127.6 #Te
group layer_1 type 1 3 4
group layer_2 type 2 5 6
pair_style hybrid sw sw  lj/cut 11.0
pair_coeff * * sw 1 scripts/afm/t-MnTe2/size_100x_100y/sub_aSi/tip_Si_r25/K300/potentials/t-MnTe2.sw Mn  NULL  Te1  Te2  NULL  NULL # interlayer '2D' Layer 1
pair_coeff * * sw 2 scripts/afm/t-MnTe2/size_100x_100y/sub_aSi/tip_Si_r25/K300/potentials/t-MnTe2.sw NULL  Mn  NULL  NULL  Te1  Te2 # interlayer '2D' Layer 2
pair_coeff 1 2 lj/cut 0.0005637242 2.961
pair_coeff 1 5*6 lj/cut 0.0031191519991439084 3.7154999999999996
pair_coeff 2 3*4 lj/cut 0.0031191519991439084 3.7154999999999996
pair_coeff 3*4 5*6 lj/cut 0.0172586332 4.47
