mass 1*2 186.207 #Re
mass 3*6 127.6 #Te
group layer_1 type 1 3 4
group layer_2 type 2 5 6
pair_style hybrid sw sw  lj/cut 11.0
pair_coeff * * sw 1 scripts/afm/t-ReTe2/size_100x_100y/sub_aSi/tip_Si_r25/K300/potentials/t-ReTe2.sw Re  NULL  Te1  Te2  NULL  NULL # interlayer '2D' Layer 1
pair_coeff * * sw 2 scripts/afm/t-ReTe2/size_100x_100y/sub_aSi/tip_Si_r25/K300/potentials/t-ReTe2.sw NULL  Re  NULL  NULL  Te1  Te2 # interlayer '2D' Layer 2
pair_coeff 1 2 lj/cut 0.0028619844 2.954
pair_coeff 1 5*6 lj/cut 0.007028082169676311 3.7119999999999997
pair_coeff 2 3*4 lj/cut 0.007028082169676311 3.7119999999999997
pair_coeff 3*4 5*6 lj/cut 0.0172586332 4.47
