mass 1*2 44.955908 #Sc
mass 3*6 15.999 #O
group layer_1 type 1 3 4
group layer_2 type 2 5 6
pair_style hybrid sw sw  lj/cut 11.0
pair_coeff * * sw 1 scripts/afm/t-ScO2/size_100x_100y/sub_aSi/tip_Si_r25/K300/potentials/t-ScO2.sw Sc  NULL  O1  O2  NULL  NULL # interlayer '2D' Layer 1
pair_coeff * * sw 2 scripts/afm/t-ScO2/size_100x_100y/sub_aSi/tip_Si_r25/K300/potentials/t-ScO2.sw NULL  Sc  NULL  NULL  O1  O2 # interlayer '2D' Layer 2
pair_coeff 1 2 lj/cut 0.0008239046 3.295
pair_coeff 1 5*6 lj/cut 0.0014641168955716617 3.3975
pair_coeff 2 3*4 lj/cut 0.0014641168955716617 3.3975
pair_coeff 3*4 5*6 lj/cut 0.002601804 3.5
