mass 1*3 118.71 #Sn
mass 4*9 78.971 #Se
group layer_1 type 1 4 5
group layer_2 type 2 6 7
group layer_3 type 3 8 9
pair_style hybrid sw sw sw  lj/cut 11.0
pair_coeff * * sw 1 scripts/afm/t-SnSe2/size_100x_100y/sub_aSi/tip_Si_r25/K300/potentials/t-SnSe2.sw Sn  NULL  NULL  Se1  Se2  NULL  NULL  NULL  NULL # interlayer '2D' Layer 1
pair_coeff * * sw 2 scripts/afm/t-SnSe2/size_100x_100y/sub_aSi/tip_Si_r25/K300/potentials/t-SnSe2.sw NULL  Sn  NULL  NULL  NULL  Se1  Se2  NULL  NULL # interlayer '2D' Layer 2
pair_coeff * * sw 3 scripts/afm/t-SnSe2/size_100x_100y/sub_aSi/tip_Si_r25/K300/potentials/t-SnSe2.sw NULL  NULL  Sn  NULL  NULL  NULL  NULL  Se1  Se2 # interlayer '2D' Layer 3
pair_coeff 1 2*3 lj/cut 0.0245870478 4.392
pair_coeff 2 3 lj/cut 0.0245870478 4.392
pair_coeff 1 6*9 lj/cut 0.017614136217084884 4.298500000000001
pair_coeff 2 8*9 lj/cut 0.017614136217084884 4.298500000000001
pair_coeff 2*3 4*5 lj/cut 0.017614136217084884 4.298500000000001
pair_coeff 3 6*7 lj/cut 0.017614136217084884 4.298500000000001
pair_coeff 4*5 6*9 lj/cut 0.0126187494 4.205
pair_coeff 6*7 8*9 lj/cut 0.0126187494 4.205
