mass 1*3 28.085 #Si sub
mass 4*6 28.085 #Si tip
mass 7*7 91.224 #Zr 2D
mass 8*9 127.6 #Te 2D
group sub_all type 1 2 3
group sub_fix type 2
group sub_thermo type 3
group tip_all type 4 5 6
group tip_fix type 5
group tip_thermo type 6
group 2D_all type 7 8 9
group layer_1 type 7 8 9
group mobile union tip_thermo sub_thermo
pair_style hybrid sw sw sw  lj/cut 8.0
pair_coeff * * sw 1 scripts/afm/t-ZrTe2/size_100x_100y/sub_aSi/tip_Si_r25/K300/potentials/Si.sw Si  Si  Si  NULL  NULL  NULL  NULL  NULL  NULL # interlayer Sub
pair_coeff * * sw 2 scripts/afm/t-ZrTe2/size_100x_100y/sub_aSi/tip_Si_r25/K300/potentials/Si.sw NULL  NULL  NULL  Si  Si  Si  NULL  NULL  NULL # interlayer Tip
pair_coeff * * sw 3 scripts/afm/t-ZrTe2/size_100x_100y/sub_aSi/tip_Si_r25/K300/potentials/t-ZrTe2.sw NULL  NULL  NULL  NULL  NULL  NULL  Zr  Te1  Te2 # interlayer '2D' Layer 1
pair_coeff 1*3 7 lj/cut 0.0072220567803967925 3.7095000000000002
pair_coeff 4*6 7 lj/cut 0.0072220567803967925 3.7095000000000002
pair_coeff 1*3 8*9 lj/cut 0.017345143181644877 4.3825
pair_coeff 4*6 8*9 lj/cut 0.017345143181644877 4.3825
pair_coeff 1*3 4*6  lj/cut 0.0174320868 4.295
