mass 1*8 95.95 #Mo
mass 9*24 32.06 #S
pair_style hybrid sw sw  lj/cut 8.0
pair_coeff * * sw 1 ./tribo_2D/Potentials/sw_lammps/h-mos2/h-mos2.sw Mo1  Mo2  Mo3  Mo4  NULL  NULL  NULL  NULL  S1  S2  S3  S4  S5  S6  S7  S8  NULL  NULL  NULL  NULL  NULL  NULL  NULL  NULL # interlayer '2D' Layer 1
pair_coeff * * sw 2 ./tribo_2D/Potentials/sw_lammps/h-mos2/h-mos2.sw NULL  NULL  NULL  NULL  Mo1  Mo2  Mo3  Mo4  NULL  NULL  NULL  NULL  NULL  NULL  NULL  NULL  S1  S2  S3  S4  S5  S6  S7  S8 # interlayer '2D' Layer 2
pair_coeff 1*4 5*8 lj/cut 0.0024283504 3.052
pair_coeff 1*4 17*24 lj/cut 0.005371463408372865 3.5435
pair_coeff 5*8 9*16 lj/cut 0.005371463408372865 3.5435
pair_coeff 9*16 17*24 lj/cut 0.0118815716 4.035
